OpenVSP model (file version 5), 1 components.
Geometry view with OpenVSP parameter names; values to 6 digits, angles in degrees, lengths in the model's unit.
Overall bounding box: X_Min=-0.141803 X_Len=0.200319 Y_Min=0 Y_Len=1.001 Z_Min=-0.00909868 Z_Len=0.20008

Wing "WingGeom"
  location (X Y Z) 0 0 0, rotation -180 -65.39 -180
  bounding box size 0.200319 1.001 0.20008
  totals: TotalSpan=1.0001 TotalProjectedSpan=1.0001 TotalChord=0.14587 TotalArea=0.155371 TotalAR=6.43748
  root: chord 0.2, twist 0, circle Circle_Diameter=0.2
  sections:
    n   Span    Root_Chord  Tip_Chord  Area        Sweep  Sweep_Location  Dihedral  Twist  Twist_Location  tip airfoil
    1   0.2001  0.2         0.2001     0.04003     0      0.5             0         73.21  0.5             NACA 16-series IdealCl=0.2909 ThickChord=0.18032
    2   0.025   0.2001      0.1966     0.00495875  0      0.5             0         73.21  0.5             NACA 16-series IdealCl=0.337 ThickChord=0.14944
    3   0.025   0.1966      0.193      0.00487     0      0.5             0         71.23  0.5             NACA 16-series IdealCl=0.3822 ThickChord=0.13945
    4   0.025   0.193       0.1895     0.00478125  0      0.5             0         69.27  0.5             NACA 16-series IdealCl=0.4288 ThickChord=0.13462
    5   0.025   0.1895      0.186      0.00469375  0      0.5             0         67.39  0.5             NACA 16-series IdealCl=0.476 ThickChord=0.13057
    6   0.025   0.186       0.1825     0.00460625  0      0.5             0         65.65  0.5             NACA 16-series IdealCl=0.5235 ThickChord=0.12653
    7   0.025   0.1825      0.1791     0.00452     0      0.5             0         63.98  0.5             NACA 16-series IdealCl=0.5707 ThickChord=0.12297
    8   0.025   0.1791      0.1757     0.004435    0      0.5             0         62.37  0.5             NACA 16-series IdealCl=0.6185 ThickChord=0.11952
    9   0.025   0.1757      0.1724     0.00435125  0      0.5             0         60.81  0.5             NACA 16-series IdealCl=0.6688 ThickChord=0.11601
    10  0.025   0.1724      0.169      0.0042675   0      0.5             0         59.39  0.5             NACA 16-series IdealCl=0.7155 ThickChord=0.11269
    11  0.025   0.169       0.1658     0.004185    0      0.5             0         58.06  0.5             NACA 16-series IdealCl=0.7598 ThickChord=0.1094
    12  0.025   0.1658      0.1625     0.00410375  0      0.5             0         56.81  0.5             NACA 16-series IdealCl=0.7982 ThickChord=0.10612
    13  0.025   0.1625      0.1591     0.00402     0      0.5             0         55.51  0.5             NACA 16-series IdealCl=0.8341 ThickChord=0.10307
    14  0.025   0.1591      0.1557     0.003935    0      0.5             0         54.3   0.5             NACA 16-series IdealCl=0.8667 ThickChord=0.09995
    15  0.025   0.1557      0.1524     0.00385125  0      0.5             0         53.14  0.5             NACA 16-series IdealCl=0.8945 ThickChord=0.09688
    16  0.025   0.1524      0.1491     0.00376875  0      0.5             0         52.11  0.5             NACA 16-series IdealCl=0.9194 ThickChord=0.09404
    17  0.025   0.1491      0.1456     0.00368375  0      0.5             0         51.13  0.5             NACA 16-series IdealCl=0.9397 ThickChord=0.0913
    18  0.025   0.1456      0.142      0.003595    0      0.5             0         50.14  0.5             NACA 16-series IdealCl=0.9566 ThickChord=0.08836
    19  0.025   0.142       0.1386     0.0035075   0      0.5             0         49.09  0.5             NACA 16-series IdealCl=0.971 ThickChord=0.08544
    20  0.025   0.1386      0.135      0.00342     0      0.5             0         48.14  0.5             NACA 16-series IdealCl=0.983 ThickChord=0.08259
    21  0.025   0.135       0.1314     0.00333     0      0.5             0         47.21  0.5             NACA 16-series IdealCl=0.993 ThickChord=0.07979
    22  0.025   0.1314      0.128      0.0032425   0      0.5             0         46.31  0.5             NACA 16-series IdealCl=0.9995 ThickChord=0.07715
    23  0.025   0.128       0.1246     0.0031575   0      0.5             0         45.43  0.5             NACA 16-series IdealCl=0.9999 ThickChord=0.0744
    24  0.025   0.1246      0.1212     0.0030725   0      0.5             0         44.61  0.5             NACA 16-series IdealCl=0.9952 ThickChord=0.07136
    25  0.025   0.1212      0.1179     0.00298875  0      0.5             0         43.81  0.5             NACA 16-series IdealCl=0.9839 ThickChord=0.06861
    26  0.025   0.1179      0.1146     0.00290625  0      0.5             0         42.98  0.5             NACA 16-series IdealCl=0.9642 ThickChord=0.06597
    27  0.025   0.1146      0.1113     0.00282375  0      0.5             0         42.14  0.5             NACA 16-series IdealCl=0.9364 ThickChord=0.06351
    28  0.025   0.1113      0.1078     0.00273875  0      0.5             0         41.29  0.5             NACA 16-series IdealCl=0.898 ThickChord=0.06091
    29  0.025   0.1078      0.104      0.0026475   0      0.5             0         40.36  0.5             NACA 16-series IdealCl=0.8407 ThickChord=0.05784
    30  0.025   0.104       0.0997     0.00254625  0      0.5             0         39.39  0.5             NACA 16-series IdealCl=0.7694 ThickChord=0.05338
    31  0.025   0.0997      0.094      0.00242125  0      0.5             0         38.33  0.5             NACA 16-series IdealCl=0.6732 ThickChord=0.04681
    32  0.025   0.094       0.0845     0.00223125  0      0.5             0         37.16  0.5             NACA 16-series IdealCl=0.5582 ThickChord=0.03696
    33  0.025   0.0845      0.05       0.00168125  0      0.5             0         35.89  0.5             as above
