OpenVSP model (file version 5), 3 components.
Geometry view with OpenVSP parameter names; values to 6 digits, angles in degrees, lengths in the model's unit.
Overall bounding box: X_Min=-0.96 X_Len=2.302 Y_Min=-0.152541 Y_Len=0.305083 Z_Min=-0.152542 Z_Len=0.305084

Wing "WingGeom"
  location (X Y Z) 0.978261 0 0, rotation -45 0 0
  2 copies around X
  bounding box size 0.32657 0.277193 0.277193
  totals: TotalSpan=0.382 TotalProjectedSpan=0.382 TotalChord=0.230875 TotalArea=0.0881943 TotalAR=1.65457
  root: chord 0.31875, twist 0, biconvex ThickChord=0.07
  sections:
    n  Span   Root_Chord  Tip_Chord  Area       Sweep    Sweep_Location  Dihedral  Twist  Twist_Location  tip airfoil
    1  0.191  0.31875     0.143      0.0440971  43.8636  0               0         0      0.25            as above

Fuselage "FuselageGeom"
  location (X Y Z) -0.96 0 0, rotation 0 0 0
  bounding box size 2.302 0.305083 0.305084
  Design: Length=2.302
  cross sections:
    n  XLocPercent  YLocPercent  ZLocPercent  shape
    0  0            0            0            point
    1  0.25         0            0            ellipse Ellipse_Height=0.25831 Ellipse_Width=0.258309
    2  0.5          0            0            ellipse Ellipse_Height=0.28885 Ellipse_Width=0.288851
    3  0.75         0            0            ellipse Ellipse_Height=0.20524 Ellipse_Width=0.205236
    4  1            0            0            circle Circle_Diameter=0.0612876

Wing "WingGeom"
  location (X Y Z) 0.978261 0 0, rotation 45 0 0
  2 copies around X
  bounding box size 0.32657 0.277193 0.277193
  totals: TotalSpan=0.382 TotalProjectedSpan=0.382 TotalChord=0.230875 TotalArea=0.0881943 TotalAR=1.65457
  root: chord 0.31875, twist 0, biconvex ThickChord=0.07
  sections:
    n  Span   Root_Chord  Tip_Chord  Area       Sweep    Sweep_Location  Dihedral  Twist  Twist_Location  tip airfoil
    1  0.191  0.31875     0.143      0.0440971  43.8636  0               0         0      0.25            as above

VSPAERO settings: Sref=0.058 bref=0.382 cref=2.302 Xcg=0 Ycg=0 Zcg=0 AlphaStart=0 AlphaEnd=10 AlphaNpts=1 BetaStart=0 BetaEnd=0 BetaNpts=1 MachStart=0.176 MachEnd=0.8 MachNpts=1 ReCref=1e+06 Vinf=100 Rho=0.002377
